OpenVSP model (file version 5), 11 components.
Geometry view with OpenVSP parameter names; values to 6 digits, angles in degrees, lengths in the model's unit.
Overall bounding box: X_Min=-0.011 X_Len=0.533803 Y_Min=-0.6 Y_Len=1.2 Z_Min=-0.0135494 Z_Len=0.218549

Blank "Wings_Parent"
  location (X Y Z) 0 0 0, rotation 0 0 0

Wing "Forward wing", child of "Wings_Parent"
  location (X Y Z) 0 0 0.13, rotation 0 2 0
  symmetric about XZ
  bounding box size 0.127411 1.0198 0.0267967
  mass: Density=0 Shell_Flag=1 Mass_Area=1 Mass_Prior=0
  totals: TotalSpan=1.0198 TotalProjectedSpan=1.0198 TotalChord=0.127475 TotalArea=0.13 TotalAR=8
  root: chord 0.127475, twist 0, NACA 4-series Camber=0.02 CamberLoc=0.4 ThickChord=0.2
  sections:
    n  Span      Root_Chord  Tip_Chord  Area   Sweep  Sweep_Location  Dihedral  Twist  Twist_Location  tip airfoil
    1  0.509902  0.127475    0.127475   0.065  0      0               0         0      0.25            NACA 4-series Camber=0.02 CamberLoc=0.4 ThickChord=0.21
  SS_Control "Ailerons": UStart=0.55 UEnd=0.66 Length_C_Start=0.25 Length_C_End=0.25 Length_Start=0.0318689 Length_End=0.0318689 LE_Flag=0 Surf_Type=2
  SS_Control "Elevators": UStart=0.35 UEnd=0.53 Length_C_Start=0.25 Length_C_End=0.25 Length_Start=0.0318689 Length_End=0.0318689 LE_Flag=0 Surf_Type=2
  structure "Forward wing_Struct0": Skin

Wing "Aft wing", child of "Wings_Parent"
  location (X Y Z) 0.35 0 0, rotation 0 0.75 0
  symmetric about XZ
  bounding box size 0.150014 1.2 0.0315388
  mass: Density=0 Shell_Flag=1 Mass_Area=1 Mass_Prior=0
  totals: TotalSpan=1.2 TotalProjectedSpan=1.2 TotalChord=0.15 TotalArea=0.18 TotalAR=8
  root: chord 0.15, twist 0, NACA 4-series Camber=0.02 CamberLoc=0.4 ThickChord=0.21
  sections:
    n  Span  Root_Chord  Tip_Chord  Area  Sweep  Sweep_Location  Dihedral  Twist  Twist_Location  tip airfoil
    1  0.6   0.15        0.15       0.09  0      0               0         0      0.25            as above

Pod "Electronics blister", child of "Wings_Parent"
  location (X Y Z) -0.01 0 0.13, rotation 0 0 0
  bounding box size 0.14 0.0466667 0.0466667
  mass: Density=0 Shell_Flag=1 Mass_Area=1 Mass_Prior=0
  Design: FineRatio=6 Length=0.14

Stack "Connecting strut", child of "Wings_Parent"
  location (X Y Z) 0.09 0 0.13, rotation 0 27 0
  bounding box size 0.251922 0.025 0.144853
  mass: Density=0 Shell_Flag=1 Mass_Area=1 Mass_Prior=0
  cross sections:
    n  XDelta  YDelta  ZDelta  shape
    0  0       0       0       circle Circle_Diameter=0.025
    1  0.27    0       0       as above

Blank "Tail_Parent"
  location (X Y Z) 0.36 0 -0.002, rotation 0 0 0

Wing "Vertical stabilizer", child of "Tail_Parent"
  location (X Y Z) 0.36 0 -0.002, rotation 90 0 0; relative location 0 0 0, rotation 90 0 0
  bounding box size 0.111803 0.0134225 0.139711
  mass: Density=0 Shell_Flag=1 Mass_Area=1 Mass_Prior=0
  totals: TotalSpan=0.134164 TotalProjectedSpan=0.134164 TotalChord=0.111803 TotalArea=0.015 TotalAR=1.2
  root: chord 0.111803, twist 0, NACA 4-series Camber=0 CamberLoc=0.2 ThickChord=0.12
  sections:
    n  Span      Root_Chord  Tip_Chord  Area   Sweep  Sweep_Location  Dihedral  Twist  Twist_Location  tip airfoil
    1  0.134164  0.111803    0.111803   0.015  0      0               0         0      0.25            NACA 4-series Camber=0 CamberLoc=0.2 ThickChord=0.1
  SS_Control "Rudder": UStart=0.4 UEnd=0.6 Length_C_Start=0.25 Length_C_End=0.25 Length_Start=0.0279508 Length_End=0.0279508 LE_Flag=0 Surf_Type=2

Blank "Engine_Parent"
  location (X Y Z) -0.011 0 0.13, rotation 0 0 0

Custom "Propeller disk", child of "Engine_Parent"
  location (X Y Z) -0.011 0 0.13, rotation 0 0 0; relative location 0 0 0, rotation 0 0 0
  bounding box size 0 0.15 0.15
  Design: Diameter=0.15
  custom script Disk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

Stack "Engine nacelle", child of "Engine_Parent"
  location (X Y Z) -0.01 0 0.13, rotation 0 0 0; relative location 0.001 0 0, rotation 0 0 0
  bounding box size 0.08 0.0346306 0.0346306
  mass: Density=0 Shell_Flag=1 Mass_Area=1 Mass_Prior=0
  cross sections:
    n  XDelta  YDelta  ZDelta  shape
    0  0       0       0       circle Circle_Diameter=0.03
    1  0.04    0       0       as above
    2  0.04    0       0       point

Mesh "MeshGeom"
  location (X Y Z) 0 0 0, rotation 0 0 0
  triangle mesh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

VSPAERO settings: Sref=0.13 bref=1.0198 cref=0.127475 Xcg=0.195 Ycg=3.66936e-08 Zcg=0.0562751 AlphaStart=-10 AlphaEnd=15 AlphaNpts=6 BetaStart=0 BetaEnd=30 BetaNpts=1 MachStart=0 MachEnd=0 MachNpts=1 ReCref=94644 Vinf=10 Rho=0.002377
  control group "Ailerons": DeflectionAngle=0
  control group "Elevator": DeflectionAngle=0
  control group "Rudder": DeflectionAngle=0
